<Lems>

    <!-- Test of implementation in LEMS of PyNN cell models ...-->

    <!-- This is a file which can be read and executed by the LEMS Interpreter.
         It imports the LEMS definitions of the core NeuroML 2 Components, creates
         a model in "pure" NeuroML 2 and contains some LEMS elements for running
         a simulation -->

    <!-- Specify which component to run -->
    <Target component="sim1"/>

    <Include file="Cells.xml"/>
    <!-- The above file includes NeuroMLCoreDimensions.xml, Channels.xml, Synapses.xml and Inputs.xml-->
    <Include file="PyNN.xml"/>
    <Include file="Networks.xml"/>
    <Include file="Simulation.xml"/>

    <Include file="../examples/NML2_PyNNCells.nml"/>

    <Simulation id="sim1" length="500.0ms" step="0.01ms" target="netAll">
        <Display id="display_0" timeScale="1ms" title="PyNN IaF models run in LEMS" xmin="0" xmax="500" ymin="-72" ymax="-48">
            <Line color="#000000" id="IF_curr_alpha_v" quantity="pop_IF_curr_alpha[0]/v" scale="1mV" timeScale="1ms"/>
            <Line color="#FF0000" id="IF_curr_exp_v" quantity="pop_IF_curr_exp[0]/v" scale="1mV" timeScale="1ms"/>
            <Line color="#0000FF" id="IF_cond_alpha_v" quantity="pop_IF_cond_alpha[0]/v" scale="1mV" timeScale="1ms"/>
            <Line color="#009b00" id="IF_cond_exp_v" quantity="pop_IF_cond_exp[0]/v" scale="1mV" timeScale="1ms"/>
        </Display>
        <Display id="display_1" timeScale="1ms" title="PyNN EIF model run in LEMS" xmin="0" xmax="500" ymin="-72" ymax="-38">
            <Line color="#ffc800" id="EIF_cond_exp_isfa_ista_v" quantity="pop_EIF_cond_exp_isfa_ista[0]/v" scale="1mV" timeScale="1ms"/>
            <Line color="#ffaaaa" id="EIF_cond_alpha_isfa_ista_v" quantity="pop_EIF_cond_alpha_isfa_ista[0]/v" scale="1mV" timeScale="1ms"/>
        </Display>
        <Display id="display_2" timeScale="1ms" title="PyNN HH model run in LEMS" xmin="0" xmax="500" ymin="-100" ymax="100">
            <Line color="#8c6400" id="HH_cond_exp_v" quantity="pop_HH_cond_exp[0]/v" scale="1mV" timeScale="1ms"/>
        </Display>
        <Display id="display_3" timeScale="1ms" title="PyNN Target population" xmin="0" xmax="500" ymin="-66" ymax="-59">
            <Line color="#0000FF" id="target1" quantity="pop_target[0]/v" scale="1mV" timeScale="1ms"/>
            <Line color="#00aaFF" id="target2" quantity="pop_target[1]/v" scale="1mV" timeScale="1ms"/>
            <Line color="#5555FF" id="target3" quantity="pop_target[2]/v" scale="1mV" timeScale="1ms"/>
            <Line color="#aaffFF" id="target4" quantity="pop_target[3]/v" scale="1mV" timeScale="1ms"/>
        </Display>
        <Display id="display_4" timeScale="1ms" title="PyNN Target syn conductances" xmin="0" xmax="500" ymin="-0.001" ymax="0.011">
            <Line color="#0000FF" id="Syn_cond: w=0.01 d=10ms" quantity="pop_target[0]/synapses:syn1:0/g" scale="1" timeScale="1ms"/>
            <Line color="#00aaFF" id="Syn_cond: w=0.005 d=20ms" quantity="pop_target[1]/synapses:syn2:0/g" scale="1" timeScale="1ms"/>
        </Display>
        <Display id="display_5" timeScale="1ms" title="PyNN Spike source" xmin="0" xmax="500" ymin="0" ymax="50">
            <Line color="#0000FF" id="spikes1" quantity="pop_spikes1[0]/tsince" scale="1ms" timeScale="1ms"/>
            <Line color="#00aaFF" id="spikes2" quantity="pop_spikes2[0]/tsince" scale="1ms" timeScale="1ms"/>
        </Display>

        <OutputFile id="of0" fileName="results/ex14.dat">
            <OutputColumn id="pop_IF_curr_exp" quantity="pop_IF_curr_exp[0]/v" />
            <OutputColumn id="pop_IF_cond_alpha" quantity="pop_IF_cond_alpha[0]/v" />
            <OutputColumn id="pop_EIF_cond_exp_isfa_ista" quantity="pop_EIF_cond_exp_isfa_ista[0]/v" />
            <OutputColumn id="pop_HH_cond_exp" quantity="pop_HH_cond_exp[0]/v" />
            <OutputColumn id="pop_target_0" quantity="pop_target[0]/v" />
            <OutputColumn id="pop_target_1" quantity="pop_target[1]/v" />
            <OutputColumn id="pop_target_2" quantity="pop_target[2]/v" />
            <OutputColumn id="pop_target_3" quantity="pop_target[3]/v" />
        </OutputFile>

        <OutputFile id="of1" fileName="results/ex14_g.dat">
            <OutputColumn id="syn1" quantity="pop_target[0]/synapses:syn1:0/g" />
            <OutputColumn id="syn2" quantity="pop_target[1]/synapses:syn2:0/g" />
        </OutputFile>

    </Simulation>

</Lems>
