<Lems>

        <!-- Example with various input currents/spike sources -->

        <!-- This is a file which can be read and executed by the LEMS Interpreter.
             It imports the LEMS definitions of the core NeuroML 2 Components, creates
             a model in "pure" NeuroML 2 and contains some LEMS elements for running
             a simulation -->

<!-- Specify which component to run -->
<Target component="sim1"/>

<!-- Include core NeuroML2 ComponentType definitions -->
<Include file="Cells.xml"/>
<Include file="Networks.xml"/>
<Include file="Inputs.xml"/>
<Include file="Simulation.xml"/>

<izhikevich2007Cell id="RS" v0 = "-60mV" C="100 pF" k = "0.7 nS_per_mV"
                        vr = "-60 mV" vt = "-40 mV" vpeak = "35 mV"
                        a = "0.03 per_ms" b = "-2 nS" c = "-50 mV" d = "100 pA"/>

<expTwoSynapse id="syn1" gbase="1nS" erev="20mV" tauRise="0.1ms" tauDecay="3ms"/>

<expTwoSynapse id="synInput" gbase="8nS" erev="20mV" tauRise="1ms" tauDecay="5ms"/>

<pulseGenerator id="pulseGen0" delay="50ms" duration="200ms" amplitude="1 nA" />

<sineGenerator id="sg0" phase="0" delay="50ms" duration="200ms" amplitude="1.4nA" period="50ms"/>

<rampGenerator id="rg0" delay="50ms" duration="200ms" startAmplitude="0.5nA" finishAmplitude="4nA" baselineAmplitude="0nA"/>

<voltageClamp id="vClamp0" delay="50ms" duration="200ms"
	      targetVoltage="-50mV" simpleSeriesResistance="1e6ohm"/>

<spikeArray id="spkArr">
  <spike id="0" time="50 ms"/>
  <spike id="1" time="100 ms"/>
  <spike id="2" time="150 ms"/>
  <spike id="3" time="155 ms"/>
  <spike id="4" time="250 ms"/>
</spikeArray>

<spikeGenerator id="spikeGenRegular" period="20 ms"/>

<spikeGeneratorRandom id="spikeGenRandom" minISI="10 ms"
		      maxISI="30 ms"/>

<spikeGeneratorPoisson id="spikeGenPoisson" averageRate="50 Hz"/>

<poissonFiringSynapse id="poissonFiringSyn" averageRate="10 Hz" synapse="synInput" spikeTarget="./synInput"/>

<network id="net1">
    <population id="izhPop" component="RS" size="9"/>

    <population id="spikeArrPop" component="spkArr" size="1"/>
    <population id="spikeGenRegularPop" component="spikeGenRegular" size="1"/>
    <population id="spikeGenPoissonPop" component="spikeGenPoisson" size="1"/>
    <population id="spikeGenRandomPop" component="spikeGenRandom" size="1"/>

    <explicitInput target="izhPop[0]" input="pulseGen0" destination="synapses"/>
    <explicitInput target="izhPop[1]" input="sg0" destination="synapses"/>
    <explicitInput target="izhPop[2]" input="rg0" destination="synapses"/>
    <explicitInput target="izhPop[3]" input="vClamp0" destination="synapses"/>
    <explicitInput target="izhPop[8]" input="poissonFiringSyn" destination="synapses"/>

    <synapticConnection from="spikeArrPop[0]" to="izhPop[4]" synapse="syn1" destination="synapses"/>
    <synapticConnection from="spikeGenRegularPop[0]" to="izhPop[5]" synapse="syn1" destination="synapses"/>
    <synapticConnection from="spikeGenRandomPop[0]" to="izhPop[6]" synapse="syn1" destination="synapses"/>
    <synapticConnection from="spikeGenPoissonPop[0]" to="izhPop[7]" synapse="syn1" destination="synapses"/>
</network>

        <!-- End of NeuroML2 content -->

<Simulation id="sim1" length="300ms" step="0.01ms" target="net1">

    <Display id="d0" title="Ex16: Izhikevich cell, current clamp input" timeScale="1ms" xmin="-20" xmax="320" ymin="-80" ymax="45">
        <Line id ="izh0 v (mV)" quantity="izhPop[0]/v" scale="1mV"  color="#ee40FF" timeScale="1ms"/>
        <Line id ="current clamp i (nA)" quantity="izhPop[0]/pulseGen0/i" scale="1nA"  color="#333333" timeScale="1ms"/>
    </Display>

   <Display id="d1" title="Ex16: Izhikevich cell, sine wave input" timeScale="1ms" xmin="-20" xmax="320" ymin="-120" ymax="45">
        <Line id ="izh1 v (mV)" quantity="izhPop[1]/v" scale="1mV"  color="#ee40FF" timeScale="1ms"/>
        <Line id ="sine wave i (nA)" quantity="izhPop[1]/sg0/i" scale="1nA"  color="#333333" timeScale="1ms"/>
    </Display>

    <Display id="d2" title="Ex16: Izhikevich cell, ramp current input" timeScale="1ms" xmin="-20" xmax="320" ymin="-110" ymax="45">
        <Line id ="izh2 v (mV)" quantity="izhPop[2]/v" scale="1mV"  color="#ee40FF" timeScale="1ms"/>
        <Line id ="ramp current i (nA)" quantity="izhPop[2]/rg0/i" scale="1nA"  color="#333333" timeScale="1ms"/>
    </Display>

    <Display id="d3" title="Ex16: Izhikevich cell, voltage clamp" timeScale="1ms" xmin="-20" xmax="320" ymin="-70" ymax="120">
        <Line id ="izh3 v (mV)" quantity="izhPop[3]/v" scale="1mV"  color="#ee40FF" timeScale="1ms"/>
        <Line id ="voltage clamp i (pA)" quantity="izhPop[3]/vClamp0/i" scale="1pA"  color="#333333" timeScale="1ms"/>
    </Display>

    <Display id="d40" title="Ex16: Izhikevich cell, spiking inputs, time since spikes" timeScale="1ms" xmin="-20" xmax="320" ymin="-5" ymax="45">
        <Line id ="Regular spike gen t since" quantity="spikeGenRegularPop[0]/tsince" scale="1ms"  color="#3fffaa" timeScale="1ms"/>
        <Line id ="Poisson spike gen t since" quantity="spikeGenRandomPop[0]/tsince" scale="1ms"  color="#3ff9999" timeScale="1ms"/>
        <Line id ="Spike array t since" quantity="spikeArrPop[0]/tsince" scale="1ms"  color="#3faa99" timeScale="1ms"/>
    </Display>

    <Display id="d4" title="Ex16: Izhikevich cell, spiking inputs" timeScale="1ms" xmin="-20" xmax="320" ymin="-61" ymax="-56">
      <Line id="spike array" quantity="izhPop[4]/v" scale="1mV"
	    color="#DBA901" timeScale="1ms"/>
      <Line id="regular spike gen" quantity="izhPop[5]/v" scale="1mV"
	    color="#80FF00" timeScale="1ms"/>
      <Line id="random (uniform) spike gen" quantity="izhPop[6]/v" scale="1mV"
	    color="#01A9DB" timeScale="1ms"/>
      <Line id="poisson spike gen" quantity="izhPop[7]/v" scale="1mV"
	    color="#8000FF" timeScale="1ms"/>
    </Display>

    <Display id="d5" title="Ex16: Izhikevich cell, poison firing synapse" timeScale="1ms" xmin="-20" xmax="320" ymin="-80" ymax="45">
        <Line id ="izh8 v (mV)" quantity="izhPop[8]/v" scale="1mV"  color="#ee40FF" timeScale="1ms"/>
        <Line id ="poison firing synapse g" quantity="izhPop[8]/poissonFiringSyn/synInput/g" scale="1nS"  color="#eeeeee" timeScale="1ms"/>
        <Line id ="poison firing synapse i" quantity="izhPop[8]/poissonFiringSyn/i" scale="0.1nA"  color="#333333" timeScale="1ms"/>
        <Line id ="poison firing synapse time since" quantity="izhPop[8]/poissonFiringSyn/tsince" scale="1ms"  color="#3fffaa" timeScale="1ms"/>
    </Display>

    <!-- <OutputFile id="of1" fileName="results/ex16_g.dat">
        <OutputColumn id="syn1exp_g" quantity="izhPop[8]/poissonFiringSyn/synInput/g" />
    </OutputFile>-->

    <OutputFile id="of0" fileName="results/ex16_v.dat">
        <OutputColumn id="v0" quantity="izhPop[0]/v" />
        <OutputColumn id="v1" quantity="izhPop[1]/v" />
        <OutputColumn id="v2" quantity="izhPop[2]/v" />
        <OutputColumn id="v2" quantity="izhPop[3]/v" />
        <OutputColumn id="v2" quantity="izhPop[4]/v" />
        <OutputColumn id="v2" quantity="izhPop[5]/v" />
        <OutputColumn id="v2" quantity="izhPop[6]/v" />
        <OutputColumn id="v2" quantity="izhPop[7]/v" />
    </OutputFile>

</Simulation>

</Lems>
