<Lems xmlns="http://www.neuroml.org/lems/0.7.4"
      xmlns:xsi="http://www.w3.org/2001/XMLSchema-instance"
      xsi:schemaLocation="http://www.neuroml.org/lems/0.7.4 ../../LEMS/Schemas/LEMS/LEMS_v0.7.4.xsd"
      description="A number of ComponentTypes for providing spiking and current inputs to other ComponentTypes">

    <Include file="NeuroMLCoreDimensions.xml"/>

    <ComponentType name="basePointCurrent"
                   description="Base type for all ComponentTypes which produce a current _i (with dimension current)"
                   extends="baseStandalone">

        <Exposure name="i" dimension="current" description="The total (time varying) current produced by this ComponentType"/>

    </ComponentType>

    <ComponentType name="baseVoltageDepPointCurrent"
                   extends="basePointCurrent"
                   description="Base type for all ComponentTypes which produce a current _i (with dimension current) and require a membrane potential _v exposed on the parent Component">

        <Requirement name="v" dimension="voltage" description="The current may vary with the voltage exposed by the ComponentType on which this is placed"/>

    </ComponentType>

    <ComponentType name="baseVoltageDepPointCurrentSpiking"
                   extends="baseVoltageDepPointCurrent"
                   description="Base type for all ComponentTypes which produce a current _i, require a membrane potential _v exposed on the parent and emit spikes (on a port _spike). The exposed variable _tsince can be used for plotting the time since the Component has spiked last">

        <EventPort name="spike"
                   direction="out"
                   description="Port on which spikes are emitted"/>

        <Exposure name="tsince"
                  dimension="time"
                  description="Time since the last spike was emitted"/>
    </ComponentType>

    <ComponentType name="basePointCurrentDL"
                   description="Base type for all ComponentTypes which produce a dimensionless current _I. There will eventually be dimensionless equivalents of all the core current producing ComponentTypes such as _pulseGenerator_, _sineGenerator_ and _rampGenerator_">

        <Exposure name="I" dimension="none" description="The total (time varying) current produced by this ComponentType"/>

    </ComponentType>

    <ComponentType name="baseVoltageDepPointCurrentDL"
                   extends="basePointCurrentDL"
                   description="Base type for all ComponentTypes which produce a dimensionless current _I and require a dimensionless membrane potential _V exposed on the parent Component">

        <Requirement name="V" dimension="none" description="The current may vary with the voltage exposed by the ComponentType on which this is placed"/>

    </ComponentType>

    <ComponentType name="baseSpikeSource"
                   description="Base for any ComponentType whose main purpose is to emit spikes (on a port _spike). The exposed variable _tsince can be used for plotting the time since the Component has spiked last">

        <EventPort name="spike"
                   direction="out"
                   description="Port on which spikes are emitted"/>

        <Exposure name="tsince"
                  dimension="time"
                  description="Time since the last spike was emitted"/>

    </ComponentType>

    <ComponentType name="spikeGenerator"
                   extends="baseSpikeSource"
                   description="Simple generator of spikes at a regular interval set by _period.">

        <Parameter name="period" dimension="time" description="Time between spikes. First spike will be emitted after this time."/>
        <Dynamics>
            <StateVariable name="tsince" dimension="time" exposure="tsince"/>

            <TimeDerivative variable="tsince" value="1"/>

            <OnStart>
                <StateAssignment variable="tsince" value="0"/>
            </OnStart>

            <OnCondition test="tsince .gt. period">
                <StateAssignment variable="tsince" value="0"/>
                <EventOut port="spike"/>
            </OnCondition>

        </Dynamics>

    </ComponentType>

    <ComponentType name="spikeGeneratorRandom" extends="baseSpikeSource"
                   description="Generator of spikes with a random interspike interval of at least _minISI and at most _maxISI">

        <Parameter name="maxISI" dimension="time" description="Maximum interspike interval"/>
        <Parameter name="minISI" dimension="time" description="Minimum interspike interval"/>

        <Constant name="MSEC" dimension="time" value="1ms"/>

        <Exposure name="isi" dimension="time" description="The interval until the next spike"/>

        <Dynamics>
            <StateVariable name="tsince" dimension="time" exposure="tsince"/>

            <StateVariable name="isi" dimension="time" exposure="isi"/>

            <TimeDerivative variable="tsince" value="1"/>

            <OnStart>
                <StateAssignment variable="tsince" value="0"/>
                <StateAssignment variable="isi" value="minISI + MSEC * random((maxISI - minISI) / MSEC)"/>
            </OnStart>

            <OnCondition test="tsince .gt. isi">
                <StateAssignment variable="isi" value="minISI + MSEC * random((maxISI - minISI) / MSEC)"/>
                <StateAssignment variable="tsince" value="0"/>
                <EventOut port="spike"/>
            </OnCondition>

        </Dynamics>
    </ComponentType>

    <ComponentType name="spikeGeneratorPoisson" extends="baseSpikeSource"
                   description="Generator of spikes whose ISI is distributed according to an exponential pdf with scale 1/_averageRate">
        <Parameter name="averageRate" dimension="per_time"/>
        <DerivedParameter name="averageIsi" dimension="time" value="1 / averageRate"/>
        <Dynamics>
            <StateVariable name="tsince" dimension="time" exposure="tsince"/>
            <StateVariable name="isi" dimension="time"/>

            <TimeDerivative variable="tsince" value="1"/>

            <OnStart>
                <StateAssignment variable="tsince" value="0"/>
                <StateAssignment variable="isi" value="- averageIsi * log(1 - random(1))"/>
            </OnStart>

            <OnCondition test="tsince .gt. isi">
                <StateAssignment variable="tsince" value="0"/>
                <StateAssignment variable="isi" value="- averageIsi * log(1 - random(1))"/>
                <EventOut port="spike"/>
            </OnCondition>
        </Dynamics>
    </ComponentType>

    <ComponentType name="spikeGeneratorRefPoisson"
                 extends="spikeGeneratorPoisson"
                 description="Generator of spikes whose ISI distribution is the maximum entropy distribution over [_minimumISI, +infinity) with mean 1/_averageRate">
        <Parameter name="minimumISI" dimension="time"/>
        <Dynamics>
            <StateVariable name="tsince" dimension="time" exposure="tsince"/>
            <StateVariable name="isi" dimension="time"/>
            <TimeDerivative variable="tsince" value="1"/>

            <OnStart>
                <StateAssignment variable="tsince" value="0"/>
                <StateAssignment variable="isi" value="minimumISI - (averageIsi-minimumISI) * log(1 - random(1))"/>
            </OnStart>

            <OnCondition test="tsince .gt. isi">
                <StateAssignment variable="tsince" value="0"/>
                <StateAssignment variable="isi" value="minimumISI - (averageIsi-minimumISI) * log(1 - random(1))"/>
                <EventOut port="spike"/>
            </OnCondition>
        </Dynamics>
    </ComponentType>

    <ComponentType name="poissonFiringSynapse"
                   description="Poisson spike generator connected to single synapse providing an input current"
                   extends="baseVoltageDepPointCurrentSpiking">

        <Property name="weight" dimension="none" defaultValue="1"/>

        <Parameter name="averageRate" dimension="per_time"/>

        <DerivedParameter name="averageIsi" dimension="time" value="1 / averageRate"/>

        <ComponentReference name="synapse" type="baseSynapse"/>

        <EventPort name="spike" direction="out" description="Port on which spikes are emitted"/>

        <!--TODO: remove! Only required as EventConnection is used in explicitInput to
        connect inputs to cells. Events aren't passed! ... -->
        <EventPort name="in" direction="in" description="Note this is not used here. Will be removed in future"/>

        <Exposure name="tsince" dimension="time" description="Time since the last spike was emitted"/>

        <Path name="spikeTarget"/>

        <Dynamics>
            <StateVariable name="tsince" dimension="time" exposure="tsince"/>
            <StateVariable name="isi" dimension="time"/>

            <DerivedVariable name="iSyn" dimension="current" select="synapse/i"/>
            <DerivedVariable name="i" dimension="current" exposure="i" value="weight * iSyn"/>

            <TimeDerivative variable="tsince" value="1"/>

            <OnStart>
                <StateAssignment variable="tsince" value="0"/>
                <StateAssignment variable="isi" value="- averageIsi * log(1 - random(1))"/>
            </OnStart>

            <OnCondition test="tsince .gt. isi">
                   <StateAssignment variable="tsince" value="0"/>
                   <StateAssignment variable="isi" value="- averageIsi * log(1 - random(1))"/>
                   <EventOut port="spike"/>
              </OnCondition>

        </Dynamics>
        <Structure>
            <ChildInstance component="synapse"/>

            <With instance="this" as="a"/>
            <With instance="spikeTarget" as="b"/>

            <EventConnection from="a" to="b"/>
        </Structure>

    </ComponentType>

    <ComponentType name="transientPoissonFiringSynapse"
                   description="Poisson spike generator with delay and duration connected to single synapse providing an input current.
                      Similar to ComponentType poissonFiringSynapse."
                   extends="baseVoltageDepPointCurrentSpiking">

        <Property name="weight" dimension="none" defaultValue="1"/>

        <Parameter name="averageRate" dimension="per_time"/>

        <Parameter name="delay" dimension="time"/>
        <Parameter name="duration" dimension="time" />

        <DerivedParameter name="averageIsi" dimension="time" value="1 / averageRate"/>

        <Constant name="LONG_TIME" dimension="time" value="1e9hour"/>

        <ComponentReference name="synapse" type="baseSynapse"/>

        <EventPort name="spike" direction="out" description="Port on which spikes are emitted"/>

        <!--TODO: remove! Only required as EventConnection is used in explicitInput to
        connect inputs to cells. Events aren't passed! ... -->
        <EventPort name="in" direction="in" description="Note this is not used here. Will be removed in future"/>

        <Exposure name="tsince" dimension="time" description="Time since the last spike was emitted"/>

        <Path name="spikeTarget"/>

        <Dynamics>
            <StateVariable name="tsince" dimension="time" exposure="tsince"/>
            <StateVariable name="nextIsi" dimension="time"/>
            <StateVariable name="isi" dimension="time"/>

            <DerivedVariable name="iSyn" dimension="current" select="synapse/i"/>
            <DerivedVariable name="i" dimension="current" exposure="i" value="weight * iSyn"/>

            <TimeDerivative variable="tsince" value="1"/>

            <OnStart>
                <StateAssignment variable="tsince" value="0"/>
                <StateAssignment variable="nextIsi" value="- averageIsi * log(1 - random(1))  +delay"/>
                <StateAssignment variable="isi" value="nextIsi"/>
            </OnStart>

            <OnCondition test="tsince .gt. isi">
                <StateAssignment variable="tsince" value="0"/>
                <StateAssignment variable="nextIsi" value="- averageIsi * log(1 - random(1))"/>
                <!--
                Check to see whether current time + next ISI is greater than delay+duration and if so set it to a long time in the future...
                The use of H() is necessary here (as opposed to checking this in the test of OnCondition) since NEURON requires a single boolean expression in test above
                -->
                <StateAssignment variable="isi" value="nextIsi + H(((t+nextIsi) - (delay+duration))/duration)*LONG_TIME"/>
                <EventOut port="spike"/>
            </OnCondition>

        </Dynamics>
        <Structure>
            <ChildInstance component="synapse"/>

            <With instance="this" as="a"/>
            <With instance="spikeTarget" as="b"/>

            <EventConnection from="a" to="b"/>
        </Structure>

    </ComponentType>

    <ComponentType name="timedSynapticInput"
                   description="Spike array connected to a single synapse, producing current triggered by each spike in the array"
                   extends="baseVoltageDepPointCurrentSpiking">

        <Property name="weight" dimension="none" defaultValue="1"/>

        <Children name="spikes" type="spike"/>

        <ComponentReference name="synapse" type="baseSynapse"/>

        <EventPort name="in" direction="in" description="This will receive events from the children"/>

        <Exposure name="tsince" dimension="time" description="Time since the last spike was emitted"/>

        <Path name="spikeTarget"/>

        <Dynamics>
            <StateVariable name="tsince" dimension="time" exposure="tsince"/>

            <DerivedVariable name="iSyn" dimension="current" select="synapse/i"/>
            <DerivedVariable name="i" dimension="current" exposure="i" value="weight * iSyn"/>

            <TimeDerivative variable="tsince" value="1"/>
            <OnEvent port="in">
                <StateAssignment variable="tsince" value="0"/>
                <EventOut port="spike"/>
            </OnEvent>

        </Dynamics>

        <Structure>
            <ChildInstance component="synapse"/>

            <With instance="this" as="a"/>
            <With instance="spikeTarget" as="b"/>

            <EventConnection from="a" to="b"/>
        </Structure>

    </ComponentType>

    <ComponentType name="pulseGenerator" extends="basePointCurrent"
                   description="Generates a constant current pulse of a certain _amplitude for a specified _duration after a _delay. Scaled by _weight, if set"> <!-- Note: a synpase also extends basePointCurrent -->

        <Property name="weight" dimension="none" defaultValue="1"/>

        <Parameter name="delay" dimension="time" description="Delay before change in current. Current is zero  prior to this."/>
        <Parameter name="duration" dimension="time" description="Duration for holding current at amplitude. Current is zero after delay + duration."/>
        <Parameter name="amplitude" dimension="current" description="Amplitude of current pulse"/>

        <!--TODO: remove! Only required as EventConnection is used in explicitInput to
        connect inputs to cells. Events aren't passed! ... -->
        <EventPort name="in" direction="in" description="Note this is not used here. Will be removed in future"/>

        <Dynamics>

            <StateVariable name="i" exposure="i" dimension="current"/>

            <OnEvent port="in"><!--TODO: remove, see above...
            <StateAssignment variable="i" value="0"/>-->
            </OnEvent>

            <OnCondition test="t .lt. delay">
                <StateAssignment variable="i" value="0"/>
            </OnCondition>

            <OnCondition test="t .geq. delay .and. t .lt. duration + delay">
                <StateAssignment variable="i" value="weight * amplitude"/>
            </OnCondition>

            <OnCondition test="t .geq. duration + delay">
                <StateAssignment variable="i" value="0"/>
            </OnCondition>

        </Dynamics>
    </ComponentType>

    <ComponentType name="compoundInput" extends="basePointCurrent"
                   description="Generates a current which is the sum of all its child _basePointCurrent_ elements">

        <Property name="weight" dimension="none" defaultValue="1"/>

        <Children name="currents" type="basePointCurrent"/>

        <!--TODO: remove! Only required as EventConnection is used in explicitInput to
        connect inputs to cells. Events aren't passed! ... -->
        <EventPort name="in" direction="in" description="Note this is not used here. Will be removed in future"/>

        <Dynamics>

            <DerivedVariable name="i_total" dimension="current" select="currents[*]/i" reduce="add"/>

            <DerivedVariable name="i" dimension="current" exposure="i" value="weight * i_total"/>

            <OnEvent port="in"><!--TODO: remove, see above... -->
            </OnEvent>

        </Dynamics>
    </ComponentType>

    <ComponentType name="compoundInputDL" extends="basePointCurrentDL"
                   description="Generates a current which is the sum of all its child _basePointCurrentDL_ elements">

        <Property name="weight" dimension="none" defaultValue="1"/>

        <Children name="currents" type="basePointCurrentDL"/>

        <!--TODO: remove! Only required as EventConnection is used in explicitInput to
        connect inputs to cells. Events aren't passed! ... -->
        <EventPort name="in" direction="in" description="Note this is not used here. Will be removed in future"/>

        <Dynamics>

            <DerivedVariable name="I_total" dimension="none" select="currents[*]/I" reduce="add"/>

            <DerivedVariable name="I" dimension="none" exposure="I" value="weight * I_total"/>

            <OnEvent port="in"><!--TODO: remove, see above... -->
            </OnEvent>

        </Dynamics>
    </ComponentType>

    <ComponentType name="pulseGeneratorDL" extends="basePointCurrentDL"
                   description="Dimensionless equivalent of _pulseGenerator_. Generates a constant current pulse of a certain _amplitude for a specified _duration after a _delay"> <!-- Note: a synpase also extends basePointCurrent -->

        <Property name="weight" dimension="none" defaultValue="1"/>

        <Parameter name="delay" dimension="time" description="Delay before change in current. Current is zero  prior to this."/>
        <Parameter name="duration" dimension="time" description="Duration for holding current at amplitude. Current is zero after delay + duration."/>
        <Parameter name="amplitude" dimension="none" description="Amplitude of current pulse"/>

        <!--TODO: remove! Only required as EventConnection is used in explicitInput to
        connect inputs to cells. Events aren't passed! ... -->
        <EventPort name="in" direction="in" description="Note this is not used here. Will be removed in future"/>

        <Dynamics>

            <StateVariable name="I" exposure="I" dimension="none"/>

            <OnEvent port="in"><!--TODO: remove, see above...-->
            </OnEvent>

            <OnCondition test="t .lt. delay">
                <StateAssignment variable="I" value="0"/>
            </OnCondition>

            <OnCondition test="t .geq. delay .and. t .lt. duration + delay">
                <StateAssignment variable="I" value="weight * amplitude"/>
            </OnCondition>

            <OnCondition test="t .geq. duration + delay">
                <StateAssignment variable="I" value="0"/>
            </OnCondition>

        </Dynamics>
    </ComponentType>

    <ComponentType name="sineGenerator" extends="basePointCurrent"
                   description="Generates a sinusoidally varying current after a time _delay, for a fixed _duration. The _period and maximum _amplitude of the current can be set as well as the _phase at which to start.">

        <Property name="weight" dimension="none" defaultValue="1"/>

        <Parameter name="phase" dimension="none"/>
        <Parameter name="delay" dimension="time"/>
        <Parameter name="duration" dimension="time"/>
        <Parameter name="amplitude" dimension="current"/>
        <Parameter name="period" dimension="time"/>

        <EventPort name="in" direction="in"/>

        <Dynamics>

            <StateVariable name="i" exposure="i" dimension="current"/>

            <OnEvent port="in"><!--TODO: remove-->
            </OnEvent>

            <OnCondition test="t .lt. delay">
                <StateAssignment variable="i" value="0"/>
            </OnCondition>

            <OnCondition test="t .geq. delay .and. t .lt. duration+delay">
                <StateAssignment variable="i" value="weight * amplitude * sin(phase + (2 * 3.14159265 * (t-delay)/period) )"/>
            </OnCondition>

            <OnCondition test="t .geq. duration+delay">
                <StateAssignment variable="i" value="0"/>
            </OnCondition>

        </Dynamics>
    </ComponentType>

    <ComponentType name="sineGeneratorDL" extends="basePointCurrentDL"
                   description="Generates a sinusoidally varying current after a time _delay, for a fixed _duration. The _period and maximum _amplitude of the current can be set as well as the _phase at which to start.">

        <Property name="weight" dimension="none" defaultValue="1"/>

        <Parameter name="phase" dimension="none"/>
        <Parameter name="delay" dimension="time"/>
        <Parameter name="duration" dimension="time"/>
        <Parameter name="amplitude" dimension="none"/>
        <Parameter name="period" dimension="time"/>

        <EventPort name="in" direction="in"/>

        <Dynamics>

            <StateVariable name="I" exposure="I" dimension="none"/>

            <OnEvent port="in"><!--TODO: remove-->
            </OnEvent>

            <OnCondition test="t .lt. delay">
                <StateAssignment variable="I" value="0"/>
            </OnCondition>

            <OnCondition test="t .geq. delay .and. t .lt. duration+delay">
                <StateAssignment variable="I" value="weight * amplitude * sin(phase + (2 * 3.14159265 * (t-delay)/period) )"/>
            </OnCondition>

            <OnCondition test="t .geq. duration+delay">
                <StateAssignment variable="I" value="0"/>
            </OnCondition>

        </Dynamics>
    </ComponentType>

    <ComponentType name="rampGenerator" extends="basePointCurrent"
                   description="Generates a ramping current after a time _delay, for a fixed _duration. During this time the current steadily changes from _startAmplitude to _finishAmplitude.">

        <Property name="weight" dimension="none" defaultValue="1"/>

        <Parameter name="delay" dimension="time"/>
        <Parameter name="duration" dimension="time"/>
        <Parameter name="startAmplitude" dimension="current"/>
        <Parameter name="finishAmplitude" dimension="current"/>
        <Parameter name="baselineAmplitude" dimension="current"/>

        <EventPort name="in" direction="in"/>

        <Dynamics>

            <StateVariable name="i" exposure="i" dimension="current"/>

            <OnStart>
                <StateAssignment variable="i" value="baselineAmplitude"/>
            </OnStart>

            <OnEvent port="in"><!--TODO: remove-->
            </OnEvent>

            <OnCondition test="t .lt. delay">
                <StateAssignment variable="i" value="weight * baselineAmplitude"/>
            </OnCondition>

            <OnCondition test="t .geq. delay .and. t .lt. duration+delay">
                <StateAssignment variable="i" value="weight * (startAmplitude + (finishAmplitude - startAmplitude) * (t - delay) / (duration))"/>
            </OnCondition>

            <OnCondition test="t .geq. duration+delay">
                <StateAssignment variable="i" value="weight * baselineAmplitude"/>
            </OnCondition>

        </Dynamics>
    </ComponentType>

    <ComponentType name="rampGeneratorDL" extends="basePointCurrentDL"
                   description="Generates a ramping current after a time _delay, for a fixed _duration. During this time the dimensionless current steadily changes from _startAmplitude to _finishAmplitude.">

        <Property name="weight" dimension="none" defaultValue="1"/>

        <Parameter name="delay" dimension="time"/>
        <Parameter name="duration" dimension="time"/>
        <Parameter name="startAmplitude" dimension="none"/>
        <Parameter name="finishAmplitude" dimension="none"/>
        <Parameter name="baselineAmplitude" dimension="none"/>

        <EventPort name="in" direction="in"/>

        <Dynamics>

            <StateVariable name="I" exposure="I" dimension="none"/>

            <OnStart>
                <StateAssignment variable="I" value="baselineAmplitude"/>
            </OnStart>

            <OnEvent port="in"><!--TODO: remove-->
            </OnEvent>

            <OnCondition test="t .lt. delay">
                <StateAssignment variable="I" value="weight * baselineAmplitude"/>
            </OnCondition>

            <OnCondition test="t .geq. delay .and. t .lt. duration+delay">
                <StateAssignment variable="I" value="weight * (startAmplitude + (finishAmplitude - startAmplitude) * (t - delay) / (duration))"/>
            </OnCondition>

            <OnCondition test="t .geq. duration+delay">
                <StateAssignment variable="I" value="weight * baselineAmplitude"/>
            </OnCondition>

        </Dynamics>
    </ComponentType>

    <ComponentType name="voltageClamp" extends="baseVoltageDepPointCurrent"
                   description="Voltage clamp. Applies a variable current _i to try to keep parent at _targetVoltage. Not yet fully tested!!! Consider using voltageClampTriple!!">

        <Property name="weight" dimension="none" defaultValue="1"/>

        <Parameter name="delay" dimension="time" description="Delay before change in current. Current is zero  prior to this."/>
        <Parameter name="duration" dimension="time" description="Duration for attempting to keep parent at targetVoltage. Current is zero after delay + duration."/>
        <Parameter name="targetVoltage" dimension="voltage" description="Current will be applied to try to get parent to this target voltage"/>

        <!-- seriesResistance renamed to simpleSeriesResistance & factor of 1e-5 removed from calculation of current. Still being tested... -->
        <Parameter name="simpleSeriesResistance" dimension="resistance" description="Current will be calculated by the difference in voltage between the target and parent, divided by this value"/>

        <!--TODO: remove! Only required as EventConnection is used in explicitInput to
        connect inputs to cells. Events aren't passed! ... -->
        <EventPort name="in" direction="in" description="Note this is not used here. Will be removed in future"/>

        <Dynamics>

            <StateVariable name="i" exposure="i" dimension="current"/>

            <OnEvent port="in"><!--TODO: remove, see above...
            <StateAssignment variable="i" value="0"/>-->
            </OnEvent>

            <OnCondition test="t .lt. delay">
                <StateAssignment variable="i" value="0"/>
            </OnCondition>

            <OnCondition test="t .geq. delay">
                <!-- seriesResistance renamed to simpleSeriesResistance & factor of 1e-5 removed from calculation of current. Still being tested... -->
                <StateAssignment variable="i" value="weight * (targetVoltage - v) / simpleSeriesResistance"/>
            </OnCondition>

            <OnCondition test="t .gt. duration + delay">
                <StateAssignment variable="i" value="0"/>
            </OnCondition>

        </Dynamics>

    </ComponentType>

    <ComponentType name="voltageClampTriple" extends="baseVoltageDepPointCurrent"
                   description="Voltage clamp with 3 clamp levels. Applies a variable current _i (through _simpleSeriesResistance) to try to keep parent cell at _conditioningVoltage until time _delay, _testingVoltage until _delay + _duration, and _returnVoltage afterwards. Only enabled if _active = 1. ">

        <Property name="weight" dimension="none" defaultValue="1"/>

        <Parameter name="active" dimension="none" description="Whether the voltage clamp is active (1) or inactive (0)."/>

        <Parameter name="delay" dimension="time" description="Delay before switching from conditioningVoltage to testingVoltage."/>
        <Parameter name="duration" dimension="time" description="Duration to hold at testingVoltage."/>
        <Parameter name="conditioningVoltage" dimension="voltage" description="Target voltage before time delay"/>
        <Parameter name="testingVoltage" dimension="voltage" description="Target voltage between times delay and delay + duration"/>
        <Parameter name="returnVoltage" dimension="voltage" description="Target voltage after time duration"/>

        <Parameter name="simpleSeriesResistance" dimension="resistance" description="Current will be calculated by the difference in voltage between the target and parent, divided by this value"/>

        <!--TODO: remove! Only required as EventConnection is used in explicitInput to
        connect inputs to cells. Events aren't passed! ... -->
        <EventPort name="in" direction="in" description="Note this is not used here. Will be removed in future"/>

        <Dynamics>

            <StateVariable name="i" exposure="i" dimension="current"/>

            <OnEvent port="in"><!--TODO: remove, see above...
            <StateAssignment variable="i" value="0"/>-->
            </OnEvent>

            <OnCondition test="active .eq. 1 .and. t .lt. delay">
                <StateAssignment variable="i" value="weight * (conditioningVoltage - v) / simpleSeriesResistance"/>
            </OnCondition>

            <OnCondition test="active .eq. 1 .and. t .geq. delay">
                <StateAssignment variable="i" value="weight * (testingVoltage - v) / simpleSeriesResistance"/>
            </OnCondition>

            <OnCondition test="active .eq. 1 .and. t .gt. duration + delay">
                <StateAssignment variable="i" value="weight * (returnVoltage - v) / simpleSeriesResistance"/>
            </OnCondition>

        </Dynamics>

    </ComponentType>

    <ComponentType name="spikeArray" extends="baseSpikeSource"
                   description="Set of spike ComponentTypes, each emitting one spike at a certain time. Can be used to feed a predetermined spike train into a cell">

        <Children name="spikes" type="spike"/>
        <EventPort name="in" direction="in" description="This will receive events from the children"/>

        <Dynamics>
            <StateVariable name="tsince" dimension="time" exposure="tsince"/>

            <TimeDerivative variable="tsince" value="1"/>

            <OnStart>
                <StateAssignment variable="tsince" value="0"/>
            </OnStart>

            <OnEvent port="in">
                <StateAssignment variable="tsince" value="0"/>
                <EventOut port="spike"/>
            </OnEvent>

        </Dynamics>

    </ComponentType>

    <ComponentType name="spike" extends="baseSpikeSource"
                   description="Emits a single spike at the specified time">

        <Parameter name="time" dimension="time" description="Time at which to emit one spike event"/>
        <Exposure name="spiked" dimension="none" description="0 signals not yet spiked, 1 signals has spiked"/>

        <Dynamics>

            <StateVariable name="tsince" dimension="time" exposure="tsince"/>
            <StateVariable name="spiked" dimension="none" exposure="spiked"/>

            <TimeDerivative variable="tsince" value="1"/>

            <OnStart>
                <StateAssignment variable="tsince" value="0"/>
            </OnStart>

            <OnCondition test="(t .geq. time) .and. (spiked .eq. 0)">
                <StateAssignment variable="spiked" value="1"/>
                <StateAssignment variable="tsince" value="0"/>
                <EventOut port="spike"/>
            </OnCondition>
        </Dynamics>

        <Structure>
            <With instance="this" as="a"/>
            <With instance="parent" as="b"/>
            <EventConnection from="a" to="b"/>
        </Structure>

    </ComponentType>

    <!-- Work in progress  ...
    <ComponentType name="spikeTimes" extends="baseVoltageDepPointCurrentSpiking"
                   description="Set of ...">

        <Property name="weight" dimension="none" defaultValue="1"/>

        <Property name="target_id" dimension="none" description="..."/>

        <Children name="spikeTimeIndex" type="spikeTimeIndex"/>

        <ComponentReference name="synapse" type="baseSynapse"/>

        <EventPort name="in" direction="in" description="This will receive events from the children"/>

        <Path name="spikeTarget"/>

        <Dynamics>
            <StateVariable name="tsince" dimension="time" exposure="tsince"/>

            <DerivedVariable name="iSyn" dimension="current" select="synapse/i"/>
            <DerivedVariable name="i" dimension="current" exposure="i" value="weight * iSyn"/>

            <TimeDerivative variable="tsince" value="1"/>
            <OnStart>
                <StateAssignment variable="tsince" value="0"/>
            </OnStart>

            <OnEvent port="in">
                <StateAssignment variable="tsince" value="0"/>
                <EventOut port="spike"/>
            </OnEvent>

        </Dynamics>

        <Structure>
            <ChildInstance component="synapse"/>

            <With instance="this" as="a"/>
            <With instance="spikeTarget" as="b"/>

            <EventConnection from="a" to="b"/>
        </Structure>

    </ComponentType>

    <ComponentType name="spikeTimeIndex" extends="baseSpikeSource"
                   description="Emits a single spike at the specified time to an identified cell index">

        <Requirement name="target_id" dimension="none" description="..."/>

        <Parameter name="time" dimension="time" description="Time at which to emit one spike event"/>
        <Parameter name="cell_id" dimension="none" description="..."/>

        <Exposure name="spiked" dimension="none" description="0 signals not yet spiked, 1 signals has spiked"/>

        <Dynamics>

            <StateVariable name="tsince" dimension="time" exposure="tsince"/>
            <StateVariable name="spiked" dimension="none" exposure="spiked"/>

            <TimeDerivative variable="tsince" value="1"/>

            <OnStart>
                <StateAssignment variable="tsince" value="0"/>
            </OnStart>

            <OnCondition test="(t .geq. time) .and. (spiked .eq. 0) .and. (target_id .eq. cell_id)">
                <StateAssignment variable="spiked" value="1"/>
                <StateAssignment variable="tsince" value="0"/>
                <EventOut port="spike"/>
            </OnCondition>
        </Dynamics>

        <Structure>
            <With instance="this" as="a"/>
            <With instance="parent" as="b"/>
            <EventConnection from="a" to="b"/>
        </Structure>

    </ComponentType>
    -->
</Lems>
