<Lems>

    <!-- Example with Simple cell with Hodgkin Huxley channels -->

    <!-- This is a file which can be read and executed by the LEMS Interpreter.
         It imports the LEMS definitions of the core NeuroML 2 Components, creates
         a model in "pure" NeuroML 2 and contains some LEMS elements for running
         a simulation -->

    <!-- Specify which component to run -->
    <Target component="sim1"/>

    <!-- Include core NeuroML2 ComponentType definitions -->
    <Include file="Cells.xml"/>
    <Include file="Networks.xml"/>
    <Include file="Simulation.xml"/>

            <!-- Main NeuroML2 content -->

    <ionChannel id="passive" type="ionChannelPassive" conductance="10pS"/>

    <ionChannel id="na" type="ionChannelHH" conductance="10pS">

       <gateHHrates id="m" instances="3">
            <forwardRate type="HHExpLinearRate" rate="1per_ms" midpoint="-40mV" scale="10mV"/>
            <reverseRate type="HHExpRate" rate="4per_ms" midpoint="-65mV" scale="-18mV"/>
       </gateHHrates>

       <gateHHrates id="h" instances="1">
           <forwardRate type="HHExpRate" rate="0.07per_ms" midpoint="-65mV" scale="-20mV"/>
           <reverseRate type="HHSigmoidRate" rate="1per_ms" midpoint="-35mV" scale="10mV"/>
           <!--<steadyState type="HHSigmoidVariable" rate="1" midpoint="-40mV" scale="10mV"/>-->
       </gateHHrates>

    </ionChannel>

    <ionChannel id="k" type="ionChannelHH" conductance="10pS">
        <gateHHrates id="n" instances="4">
            <forwardRate type="HHExpLinearRate" rate="0.1per_ms" midpoint="-55mV" scale="10mV"/>
            <reverseRate type="HHExpRate" rate="0.125per_ms" midpoint="-65mV" scale="-80mV"/>
        </gateHHrates>
    </ionChannel>

    <abstractCell id="hhcell" type="pointCellCondBased" C="10pF"  v0="-65mV" thresh="20mV">

        <channelPopulation id="leak" ionChannel="passive" number="300" erev="-4.3mV"/>
        <channelPopulation id="naChans" ionChannel="na" number="120000" erev="50mV"/>
        <channelPopulation id="kChans" ionChannel="k" number="36000" erev="-77mV"/>

    </abstractCell>

    <pulseGenerator id="pulseGen1" delay="50ms" duration="50ms" amplitude="0.08 nA" />

    <voltageClamp id="vClamp1" delay="150ms" duration="50ms" targetVoltage="0mV" seriesResistance="10ohm"/>

    <network id="net1">
        <population id="hhpop" component="hhcell" size="1"/>
        <explicitInput target="hhpop[0]" input="pulseGen1" destination="synapses"/>
        <explicitInput target="hhpop[0]" input="vClamp1" destination="synapses"/>
    </network>

    <!-- End of NeuroML2 content -->

    <Simulation id="sim1" length="150ms" step="0.01ms" target="net1">

        <Display id="d1" title="Ex1: Simple HH example: Voltage" timeScale="1ms" xmin="0" xmax="150" ymin="-90" ymax="60">
            <Line id="l1" quantity="hhpop[0]/v" scale="1mV"  color="#ff00ff" timeScale="1ms"/>
        </Display>
        <!--
        <Display id="d2" title="Ex1: Simple HH example: rate variables" timeScale="1ms" xmin="0" xmax="150" ymin="-0.1" ymax="1.1">

            <Line id="l2" quantity="hhpop[0]/naChans/na/m/q" scale="1"  color="#000000" timeScale="1ms"/>
            <Line id="l3" quantity="hhpop[0]/naChans/na/h/q" scale="1"  color="#ff0000" timeScale="1ms"/>
            <Line id="l4" quantity="hhpop[0]/kChans/k/n/q" scale="1"  color="#0000ff" timeScale="1ms"/>
        </Display>

        <Display id="d3" title="Ex1: Simple HH example: currents" timeScale="1ms" xmin="0" xmax="150" ymin="-0.01" ymax="0.1">
            <Line id="li1" quantity="hhpop[0]/pulseGen1/i" scale="1nA"  color="#000000" timeScale="1ms"/>
        </Display>

        <OutputFile id="of0" fileName="results/hh_v.dat">
            <OutputColumn id="v" quantity="hhpop[0]/v"/>
        </OutputFile>  -->

    </Simulation>

</Lems>
