<Lems xmlns="http://www.neuroml.org/lems/0.7.4"
      xmlns:xsi="http://www.w3.org/2001/XMLSchema-instance"
      xsi:schemaLocation="http://www.neuroml.org/lems/0.7.4 ../../LEMS/Schemas/LEMS/LEMS_v0.7.4.xsd"
      description="Network descriptions in NeuroML 2. Describes _network_ elements containing _population_s ">

    <!-- A number of network elements for use in NeuroML 2 documents  -->

    <Include file="NeuroMLCoreDimensions.xml"/>
    <Include file="Synapses.xml"/>

    <ComponentType name="network" description="Network containing _population_s, _projection_s and lists of _explicitConnection_s (either directly between components of the populations or via synapses)">
        <Child name="notes" type="notes"/>

        <Children name="regions" type="region"/>
        <Children name="populations" type="basePopulation"/>

        <Children name="projections" type="projection"/>
        <Children name="synapticConnections" type="explicitConnection"/>  <!-- Connection either directly between cells or to synapse attachment on post cell-->

        <Children name="electricalProjection" type="electricalProjection"/>
        <Children name="continuousProjection" type="continuousProjection"/>

        <Children name="explicitInputs" type="explicitInput"/>
        <Children name="inputs" type="inputList"/>

    </ComponentType>

    <ComponentType name="networkWithTemperature" description="Network containing _population_s, _projection_s and lists of _explicitConnection_s (either directly between components of the populations or via synapses), and an explicit temperature" extends="network">

        <Parameter name="temperature" dimension="temperature"/>
        <Child name="notes" type="notes"/>

    </ComponentType>

    <ComponentType name="basePopulation" description="A population of cells (anything which extends _baseCell_)">
        <Child name="notes" type="notes"/>
        <Child name="property" type="property"/>
        <Child name="annotation" type="annotation"/>
        <ComponentReference name="component" type="baseCell"/>
    </ComponentType>

    <ComponentType name="population" extends="basePopulation" description="A population of components, with just one parameter for the _size">
        <Parameter name="size" dimension="none" description="Number of instances of this Component to create when the population is instantiated"/>
        <Structure>
            <MultiInstantiate number="size" component="component"/>
        </Structure>
    </ComponentType>

    <ComponentType name="populationList" extends="basePopulation" description="An explicit list of the cells in the population. Work in progress...">
        <Children name="instances" type="instance"/>

        <Text name="size"/> <!--Note: Text, not Parameter, as this is not actually used by LEMS, the <instance> elements determine the size, this attribute is really just metadata, though the two should be consistent-->
    </ComponentType>

    <ComponentType name="instance" description="Initial attempt to specify instances in populations. Work in progress...">
        <Child name="location" type="location"/>
        <Structure>
            <ChildInstance component="../component"/>
        </Structure>

    </ComponentType>

    <ComponentType name="location" description="Initial attempt to specify instances in populations. Work in progress...">
        <Parameter name="x" dimension="none"/>
        <Parameter name="y" dimension="none"/>
        <Parameter name="z" dimension="none"/>
    </ComponentType>

    <ComponentType name="region" description="Initial attempt to specify 3D region for placing cells. Work in progress...">
        <Child name="rectangularExtent" type="rectangularExtent"/>
    </ComponentType>

    <ComponentType name="rectangularExtent" description="For defining a 3D rectangular box">
        <Parameter name="xStart" dimension="none"/>
        <Parameter name="yStart" dimension="none"/>
        <Parameter name="zStart" dimension="none"/>
        <Parameter name="xLength" dimension="none"/>
        <Parameter name="yLength" dimension="none"/>
        <Parameter name="zLength" dimension="none"/>
    </ComponentType>

    <ComponentType name="projection"
        description="Projection from one population to another. Currently it's better to define an explicit list of connections, using _explicitConnection_. Work in progress...">
        <!--TODO: allow more than one...
        <Child name="synapseComponent" type="synapseComponent"/>-->
        <Children name="connections" type="connection"/>
        <Children name="connectionsWD" type="connectionWD"/>
        <ComponentReference name="synapse" type="baseSynapse"/>
        <Path name="presynapticPopulation"/>
        <Path name="postsynapticPopulation"/>
    </ComponentType>

    <ComponentType name="synapseComponent" description="Work in progress...">
        <ComponentReference name="component" type="baseSynapse"/>
    </ComponentType>

    <ComponentType name="explicitConnection"
        description="Explicit event connection between components">
        <Path name="from"/>
        <Path name="to"/>
        <Text name="targetPort"/>
    </ComponentType>

    <ComponentType name="connection"
        description="Event connection directly between named components, which gets processed via a new instance of a _synapse component which is created on the target component. Normally contained inside a _projection_ element.">

        <Path name="preCellId"/>
        <Path name="postCellId"/>
        <Text name="destination"/>
        <Text name="preFractionAlong"/>
        <Text name="postFractionAlong"/>
        <Text name="preSegmentId"/>
        <Text name="postSegmentId"/>

        <Structure>
            <With instance="preCellId" as="a"/>
            <With instance="postCellId" as="b"/>
            <EventConnection from="a" to="b" receiver="../synapse" receiverContainer="destination" sourcePort="sourcePort" targetPort="targetPort"/>
        </Structure>

    </ComponentType>

    <ComponentType name="synapticConnection"
        description="Explicit event connection between named components, which gets processed via a new instance of a _synapse component which is created on the target component"
        extends="explicitConnection">

        <ComponentReference name="synapse" type="baseSynapse"/>
        <Path name="from"/>
        <Path name="to"/>
        <Text name="destination"/>

        <Structure>
            <With instance="from" as="a"/>
            <With instance="to" as="b"/>
            <EventConnection from="a" to="b" receiver="synapse" receiverContainer="destination" sourcePort="sourcePort" targetPort="targetPort"/>
            <!--<EventConnection from="a" to="b" receiver="synapse"/>-->
        </Structure>
    </ComponentType>

    <ComponentType name="synapticConnectionWD"
                   description="Explicit event connection between named components, which gets processed via a new instance of a _synapse component which is created on the target component, includes setting of _weight and _delay for the synaptic connection"
                   extends="synapticConnection">

        <Parameter name="weight" dimension="none"/>
        <Parameter name="delay" dimension="time"/>
        <Path name="from"/>
        <Path name="to"/>

        <Structure>
            <With instance="from" as="a"/>
            <With instance="to" as="b"/>
            <!--<EventConnection from="a" to="b" receiver="synapse" receiverContainer="destination" sourcePort="sourcePort" targetPort="targetPort" delay="delay">-->
            <EventConnection from="a" to="b" receiver="synapse" delay="delay">
                <!--TODO: put back in! -->
                <Assign property="weight" value="weight"/>
            </EventConnection>
        </Structure>

    </ComponentType>

    <ComponentType name="connectionWD"
                   description="Event connection between named components, which gets processed via a new instance of a synapse component which is created on the target component, includes setting of _weight and _delay for the synaptic connection"
                   extends="connection">

        <Parameter name="weight" dimension="none"/>
        <Parameter name="delay" dimension="time"/>
        <Path name="preCellId"/>
        <Path name="postCellId"/>
        <Text name="destination"/>
        <Text name="preFractionAlong"/>
        <Text name="postFractionAlong"/>
        <Text name="preSegmentId"/>
        <Text name="postSegmentId"/>

        <Structure>
            <With instance="preCellId" as="a"/>
            <With instance="postCellId" as="b"/>
            <EventConnection from="a" to="b" receiver="../synapse" delay="delay">
                <Assign property="weight" value="weight"/>
            </EventConnection>
        </Structure>

    </ComponentType>

    <ComponentType name="electricalConnection"
                   description="To enable Gap junctions, NOTE: STILL IN DEVELOPMENT!!!!">

        <IndexParameter name="preCell"/>
        <IndexParameter name="postCell"/>

        <ComponentReference name="synapse" type="gapJunction"/>

        <ComponentRequirement name="presynapticPopulation"/>
        <ComponentRequirement name="postsynapticPopulation"/>

        <Structure>
            <With list="presynapticPopulation" index="preCell" as="a"/>
            <With list="postsynapticPopulation" index="postCell" as="b"/>
            <Tunnel name="peer" endA="a" endB="b" componentA="synapse" componentB="synapse"/>
        </Structure>

    </ComponentType>

    <ComponentType name="electricalConnectionInstance"
                   description="To enable Gap junctions, NOTE: STILL IN DEVELOPMENT!!!!">

        <ComponentReference name="synapse" type="gapJunction"/>

        <Path name="preCell"/>
        <Path name="postCell"/>

        <Text name="preFractionAlong"/>
        <Text name="postFractionAlong"/>
        <Text name="preSegment"/>
        <Text name="postSegment"/>

        <Structure>
            <With instance="preCell" as="a"/>
            <With instance="postCell" as="b"/>
            <Tunnel name="peer" endA="a" endB="b" componentA="synapse" componentB="synapse"/>
        </Structure>

    </ComponentType>

    <ComponentType name="electricalProjection"
                   description="To enable Gap junctions, NOTE: STILL IN DEVELOPMENT!!!!">
        <Children name="connections" type="electricalConnection"/>
        <Children name="connections" type="electricalConnectionInstance"/>
        <ComponentReference name="presynapticPopulation" type="population" local="true"/>
        <ComponentReference name="postsynapticPopulation" type="population" local="true"/>
    </ComponentType>

    <ComponentType name="continuousConnection"
                   description="STILL IN DEVELOPMENT!!!!">

        <IndexParameter name="preCell"/>
        <IndexParameter name="postCell"/>

        <ComponentReference name="preComponent" type="baseGradedSynapse"/>
        <ComponentReference name="postComponent" type="baseGradedSynapse"/>

        <ComponentRequirement name="presynapticPopulation"/>
        <ComponentRequirement name="postsynapticPopulation"/>

        <Structure>
            <With list="presynapticPopulation" index="preCell" as="a"/>
            <With list="postsynapticPopulation" index="postCell" as="b"/>
            <Tunnel name="peer" endA="a" endB="b" componentA="preComponent" componentB="postComponent"/>
        </Structure>

    </ComponentType>

    <ComponentType name="continuousConnectionInstance"
                   description="STILL IN DEVELOPMENT!!!!">

        <ComponentReference name="preComponent" type="baseGradedSynapse"/>
        <ComponentReference name="postComponent" type="baseGradedSynapse"/>

        <Path name="preCell"/>
        <Path name="postCell"/>

        <Text name="preFractionAlong"/>
        <Text name="postFractionAlong"/>
        <Text name="preSegment"/>
        <Text name="postSegment"/>

        <Structure>
            <With instance="preCell" as="a"/>
            <With instance="postCell" as="b"/>
            <Tunnel name="peer" endA="a" endB="b" componentA="preComponent" componentB="postComponent"/>
        </Structure>

    </ComponentType>

    <ComponentType name="continuousProjection"
                   description="STILL IN DEVELOPMENT!!!!">

        <Children name="connections" type="continuousConnection"/>
        <Children name="connections" type="continuousConnectionInstance"/>

        <ComponentReference name="presynapticPopulation" type="population" local="true"/>
        <ComponentReference name="postsynapticPopulation" type="population" local="true"/>

    </ComponentType>

    <!--
    <ComponentType name="projection2"
                   description="...">
        <ComponentReference name="presynapticPopulation" type="population" local="true"/>
        <ComponentReference name="postsynapticPopulation" type="population" local="true"/>
        <Children name="connections" type="connection2"/>
    </ComponentType>

    <ComponentType name="connection2"
                   description="...">

        <IndexParameter name="preCell"/>
        <IndexParameter name="postCell"/>

        <ComponentRequirement name="presynapticPopulation"/>
        <ComponentRequirement name="postsynapticPopulation"/>

        <ComponentReference name="synapse" type="baseSynapse"/>

        <Structure>
            <With list="presynapticPopulation" index="preCell" as="a"/>
            <With list="postsynapticPopulation" index="postCell" as="b"/>
            <EventConnection from="a" to="b" receiver="synapse" receiverContainer="destination"/>
        </Structure>

    </ComponentType>-->

    <!--   Not yet stable...

    <Component Type name="EventConnectivity">
        <Child name="Connections" type="ConnectionPattern"/>
        <Link name="source" type="population"/>
        <Link name="target" type="population"/>
    </ComponentType>

    <Component Type name="ConnectionPattern">
    </ComponentType>

    <Component Type name="AllAll" extends="ConnectionPattern">
        <Dynamics>
            <Build>
                <ForEach instances="../source" as="a">
                     <ForEach instances="../target" as="b">
                          <EventConnection from="a" to="b"/>
                     </ForEach>
                </ForEach>
            </Build>
        </Dynamics>
    </ComponentType>-->

    <ComponentType name="explicitInput" description="An explicit input (anything which extends _basePointCurrent_) to a target cell in a population">

        <ComponentReference name="input" type="basePointCurrent"/>

        <Path name="target"/>

        <Text name="destination"/>
        <Text name="sourcePort"/>
        <Text name="targetPort"/>

        <Structure>
            <With instance="target" as="a"/>
            <With instance="target" as="b"/>

            <EventConnection from="a" to="b" receiver="input" receiverContainer="destination"/>
        </Structure>
    </ComponentType>

    <ComponentType name="inputList" description="An explicit list of inputs. Not yet stable...">

        <Children name="inputs" type="input"/>
        <ComponentReference name="component" type="basePointCurrent"/>
        <Text name="population"/>

    </ComponentType>

    <ComponentType name="input" description="Initial attempt to specify input lists. Work in progress...">

        <Path name="target"/>

        <Text name="segmentId"/>
        <Text name="fractionAlong"/>

        <Text name="destination"/>
        <Structure>

            <With instance="target" as="a"/>
            <With instance="target" as="b"/>

            <EventConnection from="a" to="b" receiver="../component" receiverContainer="destination"/>
        </Structure>

    </ComponentType>

</Lems>
