<Lems xmlns="http://www.neuroml.org/lems/0.7.6"
      xmlns:xsi="http://www.w3.org/2001/XMLSchema-instance"
      xsi:schemaLocation="http://www.neuroml.org/lems/0.7.6 ../../LEMS/Schemas/LEMS/LEMS_v0.7.6.xsd">

    <!-- A number of common component types for use in NeuroML 2 documents  -->

    <!-- Including standard unit definitions for NeuroML 2 -->
    <Include file="NeuroMLCoreDimensions.xml"/>

    <!-- Potentially needed for any NeuroML 2 file...-->
    <ComponentType name="notes" description="Human readable notes/description for a Component">
    </ComponentType>

    <ComponentType name="annotation" description="A structured annotation containing metadata, specifically RDF or _property_ elements">
        <Child name="rdf:RDF" type="rdf_RDF"/>
        <Children name="property" type="property"/>
        <Dynamics/>
    </ComponentType>

    <ComponentType name="property" description="A property (a _tag and _value pair), which can be on any _baseStandalone_ either as a direct child, or within an _Annotation_. Generally something which helps the visual display or facilitates simulation of a Component, but is not a core physiological property. Common examples include: _numberInternalDivisions, equivalent of nseg in NEURON; _radius, for a radius to use in graphical displays for abstract cells (i.e. without defined morphologies); _color, the color to use for a _Population_ or _populationList_ of cells; _recommended_dt_ms, the recommended timestep to use for simulating a _Network_, _recommended_duration_ms the recommended duration to use when running a _Network_ ">
        <Text name="tag" description="Name of the property"/>
        <Text name="value" description="Value of the property"/>
        <Dynamics/>
    </ComponentType>

    <ComponentType name="baseStandalone"
        description="Base type of any Component which can have _Notes_, _Annotation_, or a _property_ list.">
        <Child name="notes" type="notes"/>
        <Child name="annotation" type="annotation"/>
        <Children name="property" type="property"/>
    </ComponentType>

    <ComponentType name="rdf_RDF" description="Structured block in an _annotation_ based on RDF. See https://github.com/OpenSourceBrain/OSB_API/blob/master/python/examples/grancelllayer.xml">
        <Child name="rdf:Description" type="rdf_Description"/>
        <Text name="xmlns:rdf"/>
        <Dynamics/>
    </ComponentType>

    <ComponentType name="rdf_Description" description="Structured block in an _annotation_ based on RDF.">

        <Child name="bqbiol:encodes" type="bqbiol_encodes"/>
        <Child name="bqbiol:hasPart" type="bqbiol_hasPart"/>
        <Child name="bqbiol:hasProperty" type="bqbiol_hasProperty"/>
        <Child name="bqbiol:hasVersion" type="bqbiol_hasVersion"/>
        <Child name="bqbiol:is" type="bqbiol_is"/>
        <Child name="bqbiol:isDescribedBy" type="bqbiol_isDescribedBy"/>
        <Child name="bqbiol:isEncodedBy" type="bqbiol_isEncodedBy"/>
        <Child name="bqbiol:isHomologTo" type="bqbiol_isHomologTo"/>
        <Child name="bqbiol:isPartOf" type="bqbiol_isPartOf"/>
        <Child name="bqbiol:isPropertyOf" type="bqbiol_isPropertyOf"/>
        <Child name="bqbiol:isVersionOf" type="bqbiol_isVersionOf"/>
        <Child name="bqbiol:occursIn" type="bqbiol_occursIn"/>
        <Child name="bqbiol:hasTaxon" type="bqbiol_hasTaxon"/>
        <Child name="bqmodel:is" type="bqmodel_is"/>
        <Child name="bqmodel:isDescribedBy" type="bqmodel_isDescribedBy"/>
        <Child name="bqmodel:isDerivedFrom" type="bqmodel_isDerivedFrom"/>
        <Text name="rdf:about"/>
        <Dynamics/>
    </ComponentType>

    <ComponentType name="baseBqbiol" description="Structured block in an _annotation_ based on RDF.">
        <Child name="rdf:Bag" type="rdf_Bag"/>
        <Dynamics/>
    </ComponentType>

    <ComponentType name="bqbiol_encodes" description="See http://co.mbine.org/standards/qualifiers" extends="baseBqbiol"/>

    <ComponentType name="bqbiol_hasPart" description="See http://co.mbine.org/standards/qualifiers" extends="baseBqbiol"/>

    <ComponentType name="bqbiol_hasProperty" description="See http://co.mbine.org/standards/qualifiers" extends="baseBqbiol"/>

    <ComponentType name="bqbiol_hasVersion" description="See http://co.mbine.org/standards/qualifiers" extends="baseBqbiol"/>

    <ComponentType name="bqbiol_is" description="See http://co.mbine.org/standards/qualifiers" extends="baseBqbiol"/>

    <ComponentType name="bqbiol_isDescribedBy" description="See http://co.mbine.org/standards/qualifiers" extends="baseBqbiol"/>

    <ComponentType name="bqbiol_isEncodedBy" description="See http://co.mbine.org/standards/qualifiers" extends="baseBqbiol"/>

    <ComponentType name="bqbiol_isHomologTo" description="See http://co.mbine.org/standards/qualifiers" extends="baseBqbiol"/>

    <ComponentType name="bqbiol_isPartOf" description="See http://co.mbine.org/standards/qualifiers" extends="baseBqbiol"/>

    <ComponentType name="bqbiol_isPropertyOf" description="See http://co.mbine.org/standards/qualifiers" extends="baseBqbiol"/>

    <ComponentType name="bqbiol_isVersionOf" description="See http://co.mbine.org/standards/qualifiers" extends="baseBqbiol">
        <Text name="xmlns:bqbiol"/>
    </ComponentType>

    <ComponentType name="bqbiol_occursIn" description="See http://co.mbine.org/standards/qualifiers" extends="baseBqbiol"/>

    <ComponentType name="bqbiol_hasTaxon" description="See http://co.mbine.org/standards/qualifiers" extends="baseBqbiol"/>

    <ComponentType name="bqmodel_is" description="See http://co.mbine.org/standards/qualifiers" extends="baseBqbiol"/>

    <ComponentType name="bqmodel_isDescribedBy" description="See http://co.mbine.org/standards/qualifiers" extends="baseBqbiol">
        <Text name="xmlns:bqmodel"/>
    </ComponentType>

    <ComponentType name="bqmodel_isDerivedFrom" description="See http://co.mbine.org/standards/qualifiers" extends="baseBqbiol"/>

    <ComponentType name="rdf_Bag" description="Structured block in an _annotation_ based on RDF.">
        <Children name="rdf:li" type="rdf:li"/>
        <Dynamics/>
    </ComponentType>

    <ComponentType name="rdf:li" description="Structured block in an _annotation_ based on RDF.">
        <Text name="rdf:resource"/>
        <Dynamics/>
    </ComponentType>

    <ComponentType name="point3DWithDiam"
                   description="Base type for ComponentTypes which specify an ( _x, _y, _z ) coordinate along with a _diameter. Note: no dimension used in the attributes for these coordinates! These are assumed to have dimension micrometer (10^-6 m). This is due to micrometers being the default option for the majority of neuronal morphology formats, and dimensions are omitted here to facilitate reading and writing of morphologies in NeuroML.">
        <Parameter name="x" dimension="none" description="x coordinate of the point. Note: no dimension used, see description of _point3DWithDiam_ for details."/>
        <Parameter name="y" dimension="none" description="y coordinate of the ppoint. Note: no dimension used, see description of _point3DWithDiam_ for details."/>
        <Parameter name="z" dimension="none" description="z coordinate of the ppoint. Note: no dimension used, see description of _point3DWithDiam_ for details."/>
        <Parameter name="diameter" dimension="none" description="Diameter of the ppoint. Note: no dimension used, see description of _point3DWithDiam_ for details."/> <!-- TODO decide whether this or radius should be default input field!!! -->

        <DerivedParameter name="radius" dimension="length" value="MICRON * diameter / 2" description="A dimensional quantity given by half the _diameter."/>
        <DerivedParameter name="xLength" dimension="length" value="MICRON * x" description="A version of _x with dimension length."/>  <!-- conversion to SI units... -->
        <DerivedParameter name="yLength" dimension="length" value="MICRON * y" description="A version of _y with dimension length."/>  <!-- conversion to SI units... -->
        <DerivedParameter name="zLength" dimension="length" value="MICRON * z" description="A version of _z with dimension length."/>  <!-- conversion to SI units... -->

        <Constant name="MICRON" dimension="length" value="1um"/>
    </ComponentType>

</Lems>
